*Heading
** Job name: desgaste Model name: Bloco simples
** Generated by: Abaqus/CAE 6.14-2
*Preprint, echo=NO, model=NO, history=NO, contact=NO
** ----------------------------------------------------------------
**
** PART INSTANCE: Part-1-1
**
*Node
      1,        28.75,          10.,          10.
      2,        28.75,           9.,          10.
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*Element, type=C3D8R
   1,  122,  123,  134,  133,    1,    2,   13,   12
   2,  123,  124,  135,  134,    2,    3,   14,   13
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*Nset, nset=Part-1-1_Set-2, generate
    1,  6171,     1
*Elset, elset=Part-1-1_Set-2, generate
    1,  5000,     1
** Section: bloco-volume
*Solid Section, elset=Part-1-1_Set-2, material=user
,
** ----------------------------------------------------------------
**
** PART INSTANCE: Part-2-1
**
*System
        -20.,       10.01,          5.,        -19.,       10.01,          5.
*Node
   6172,   2.41481447,   1.85295236,           0.
   6173,   2.16506362,         1.25,           0.
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*Element, type=R3D3
5001, 6281, 6226, 6231
5002, 6271, 6259, 6263
5003, 6246, 6253, 6241
5004, 6254, 6255, 6248
*Element, type=R3D4
5005, 6217, 6210, 6213, 6245
5006, 6215, 6178, 6244, 6282
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*Node
   6285,  -4.59242523e-16,           0.,           0.
*Nset, nset=Part-2-1-RefPt_
6285,
*Nset, nset=Part-2-1_Set-3
6285,
*Elset, elset=Part-2-1, generate
5001, 5103,    1
*Element, type=MASS, elset=Part-2-1_Set-3_Inertia-1_MASS_
5104, 6285
*Mass, elset=Part-2-1_Set-3_Inertia-1_MASS_
7.85e-10,
*Element, type=ROTARYI, elset=Part-2-1_Set-3_Inertia-1_ROTI_
5105, 6285
*Rotary Inertia, elset=Part-2-1_Set-3_Inertia-1_ROTI_
1e-10, 1e-10, 1e-10, 0., 0., 0.
*System
*Nset, nset=Set-1, generate
   11,  6171,    11
*Elset, elset=Set-1, generate
   10,  5000,    10
*Nset, nset=Set-2
6177,6179,6180,6181,6182,6183
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*Elset, elset=Set-2
5011,5012,5019,5031,5033,5034
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*Nset, nset=Set-3
6177,6179,6180,6181,6182,6183
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*Elset, elset=Set-3
5011,5012,5019,5031,5033,5034
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*Nset, nset=Set-4
6285,
*Nset, nset=Set-5
6285,
*Nset, nset=Set-6
6285,
*Elset, elset=_Surf-1_SPOS, generate
5001, 5103,    1
*Surface, type=ELEMENT, name=Surf-1
_Surf-1_SPOS, SPOS
*Elset, elset=_Surf-2_S6, generate
    1,  4991,    10
*Surface, type=ELEMENT, name=Surf-2
_Surf-2_S6, S6
*Elset, elset=_Surf-5_SNEG, generate
5001, 5103,    1
*Surface, type=ELEMENT, name=Surf-5
_Surf-5_SNEG, SNEG
*Elset, elset=_m_Surf-3_SPOS, generate
5001, 5103,    1
*Surface, type=ELEMENT, name=m_Surf-3
_m_Surf-3_SPOS, SPOS
*Elset, elset=_s_Surf-3_S6, generate
    1,  4991,    10
*Surface, type=ELEMENT, name=s_Surf-3
_s_Surf-3_S6, S6
*Rigid Body, ref node=Part-2-1-RefPt_, elset=Part-2-1
*Amplitude, name=Amp-1
             0.,              0.,              1.,              1.
**
** MATERIALS
**
*Material, name=Volume
*Density
 7.85e-09,
*Elastic
200000., 0.3
*Material, name=user
*Density
 7.95e-09,
*Depvar, delete=3
     30,
*User Material, constants=6
200000.,   0., 200.,   0., 250., 0.02
**
** INTERACTION PROPERTIES
**
*Surface Interaction, name=IntProp-1
*Friction
 0.496,
*Surface Behavior, pressure-overclosure=HARD
**
** BOUNDARY CONDITIONS
**
** Name: BC-1 Type: Displacement/Rotation
*Boundary
Set-1, 1, 1
Set-1, 2, 2
Set-1, 3, 3
Set-1, 4, 4
Set-1, 5, 5
Set-1, 6, 6
**
** INTERACTIONS
**
** Interaction: Int-1
*Contact, op=NEW
*Contact Inclusions
Surf-1 , Surf-2
*Contact Property Assignment
 ,  , IntProp-1
** ----------------------------------------------------------------
**
** STEP: aproximacao
**
*Step, name=aproximacao, nlgeom=YES
*Dynamic, Explicit
, 1.
*Bulk Viscosity
0.06, 1.2
** Mass Scaling: Semi-Automatic
**               Whole Model
*Fixed Mass Scaling, dt=1e-05, type=below min
**
** BOUNDARY CONDITIONS
**
** Name: BC-2 Type: Displacement/Rotation
*Boundary, amplitude=Amp-1
Set-5, 1, 1
Set-5, 2, 2, -0.01
Set-5, 3, 3
Set-5, 4, 4
Set-5, 5, 5
Set-5, 6, 6
**
** INTERACTIONS
**
** Interaction: Int-1
*Contact, op=NEW
*Contact Inclusions
Surf-5 , Surf-2
*Contact Property Assignment
 ,  , IntProp-1
**
** OUTPUT REQUESTS
**
*Restart, write, number interval=1, time marks=NO
**
** FIELD OUTPUT: F-Output-2
**
*Output, field, time interval=1.
*Node Output
U,
*Element Output, directions=YES
E, S, SDV, STATUS
**
** HISTORY OUTPUT: H-Output-2
**
*Output, history, time interval=0.1
*Energy Output
ALLAE, ALLCD, ALLCW, ALLDC, ALLDMD, ALLFD, ALLIE, ALLKE, ALLMW, ALLPD, ALLPW, ALLSE, ALLVD, ALLWK, ETOTAL
*End Step
** ----------------------------------------------------------------
**
** STEP: force
**
*Step, name=force, nlgeom=YES
*Dynamic, Explicit
, 1.
*Bulk Viscosity
0.06, 1.2
** Mass Scaling: Semi-Automatic
**               Whole Model
*Fixed Mass Scaling, dt=1e-05, type=below min
**
** BOUNDARY CONDITIONS
**
** Name: BC-1 Type: Displacement/Rotation
*Boundary, op=NEW
Set-1, 1, 1
Set-1, 2, 2
Set-1, 3, 3
Set-1, 4, 4
Set-1, 5, 5
Set-1, 6, 6
** Name: BC-2 Type: Displacement/Rotation
*Boundary, op=NEW
** Name: BC-3 Type: Displacement/Rotation
*Boundary, op=NEW, amplitude=Amp-1
Set-6, 1, 1
Set-6, 3, 3
Set-6, 4, 4
Set-6, 5, 5
Set-6, 6, 6
**
** LOADS
**
** Name: Load-1   Type: Concentrated force
*Cload, amplitude=Amp-1
Set-4, 2, -10.
**
** OUTPUT REQUESTS
**
*Restart, write, number interval=1, time marks=NO
**
** FIELD OUTPUT: F-Output-2
**
*Output, field, time interval=1.
*Node Output
U,
*Element Output, directions=YES
E, S, SDV, STATUS
**
** HISTORY OUTPUT: H-Output-2
**
*Output, history, time interval=0.1
*Energy Output
ALLAE, ALLCD, ALLCW, ALLDC, ALLDMD, ALLFD, ALLIE, ALLKE, ALLMW, ALLPD, ALLPW, ALLSE, ALLVD, ALLWK, ETOTAL
*End Step
** ----------------------------------------------------------------
**
** STEP: risco
**
*Step, name=risco, nlgeom=YES
*Dynamic, Explicit
, 1.
*Bulk Viscosity
0.06, 1.2
** Mass Scaling: Semi-Automatic
**               Whole Model
*Fixed Mass Scaling, dt=1e-06, type=below min
**
** BOUNDARY CONDITIONS
**
** Name: BC-3 Type: Displacement/Rotation
*Boundary, amplitude=Amp-1
Set-6, 1, 1, 48.
**
** OUTPUT REQUESTS
**
*Restart, write, number interval=1, time marks=NO
**
** FIELD OUTPUT: F-Output-3
**
*Output, field, time interval=0.001
*Node Output
RF, U
*Element Output, directions=YES
E, S, SDV, STATUS
**
** HISTORY OUTPUT: H-Output-2
**
*Output, history, time interval=0.1
*Energy Output
ALLAE, ALLCD, ALLCW, ALLDC, ALLDMD, ALLFD, ALLIE, ALLKE, ALLMW, ALLPD, ALLPW, ALLSE, ALLVD, ALLWK, ETOTAL
*End Step
